// SBML level 2 version 4

model model()
  // Gardner_2000

  // Compartments:
  compartment compartment = 1; compartment is "cell";

  // Species:
  species u in compartment = 0;
  species v in compartment = 0;

  // Parameters:
  alpha1 = 3;
  alpha2 = 3;

  // Reactions:
  v_inhibition_of_u: => u; compartment*alpha1/(1 + v^3);  // modifiers: v
  u_degradation: u => ; compartment*u;
  u_inhibition_of_v: => v; compartment*alpha2/(1 + u^3);  // modifiers: u
  v_degradation: v => ; compartment*v;

  // Unit definitions:
  unit substance = item; substance is "dimensionless";
  unit time = 3600 second; time is "hours";
end
