// SBML level 2 version 4

model model()
  // Huang_DB_2007

  // Compartments:
  compartment compartment = 1; compartment is "cell";

  // Species:
  species x1 in compartment = 0;
  species x2 in compartment = 0;

  // Parameters:
  a1 = 1;
  a2 = 1;
  b1 = 1;
  b2 = 1;
  k1 = 1;
  k2 = 1;
  S = 0.5;
  n = 4;

  // Reactions:
  x1_self_activation: => x1; compartment*a1*x1^n/(S^n + x1^n);
  x2_inhibition_of_x1: => x1; compartment*b1*S^n/(S^n + x2^n);  // modifiers: x2
  degradation_of_x1: x1 => ; compartment*k1*x1;
  x2_self_activation: => x2; compartment*a2*x2^n/(S^n + x2^n);
  x1_inhibition_of_x2: => x2; compartment*b2*S^n/(S^n + x1^n);  // modifiers: x1
  x2_degradation: x2 => ; compartment*k2*x2;

  // Unit definitions:
  unit substance = item; substance is "dimensionless";
  unit time = 3600 second; time is "hours";
end
