// SBML level 2 version 4

model model()
  // Lang_BJ_2021

  // Compartments:
  compartment compartment = 1; compartment is "cell";

  // Species:
  species TGFbeta in compartment = 0;
  species ZEB1 in compartment = 0;
  species ZEB2 in compartment = 0;
  species SNAI1 in compartment = 0;
  species SNAI2 in compartment = 0;
  species TWIST1 in compartment = 0;
  species FOXC2 in compartment = 0;
  species GSC in compartment = 0;
  species TCF3 in compartment = 0;
  species VIM in compartment = 0;
  species miR145 in compartment = 0;
  species miR141 in compartment = 0;
  species miR200 in compartment = 0;
  species miR34a in compartment = 0;
  species Ovol2 in compartment = 0;
  species CDH1 in compartment = 0;

  // Parameters:
  a = 2;
  tilde = 7.9;
  b = 4;
  sa = 5.8;
  sb = 0.21;
  n = 4;
  k = 1;

  // Reactions:
  FOXC2_inhibition_of_CDH1: => CDH1; compartment*b*sb^n/(sb^n + FOXC2^n);  // modifiers: FOXC2
  GSC_activation_of_FOXC2: => FOXC2; compartment*a*GSC^n/(sa^n + GSC^n);  // modifiers: GSC
  GSC_activation_of_SNAI1: => SNAI1; compartment*a*GSC^n/(sa^n + GSC^n);  // modifiers: GSC
  GSC_activation_of_ZEB1: => ZEB1; compartment*a*GSC^n/(sa^n + GSC^n);  // modifiers: GSC
  GSC_activation_of_ZEB2: => ZEB2; compartment*a*GSC^n/(sa^n + GSC^n);  // modifiers: GSC
  Ovol2_inhibition_of_SNAI1: => SNAI1; compartment*b*sb^n/(sb^n + Ovol2^n);  // modifiers: Ovol2
  Ovol2_inhibition_of_TGFbeta: => TGFbeta; compartment*b*sb^n/(sb^n + Ovol2^n);  // modifiers: Ovol2
  Ovol2_inhibition_of_VIM: => VIM; compartment*b*sb^n/(sb^n + Ovol2^n);  // modifiers: Ovol2
  Ovol2_inhibition_of_ZEB1: => ZEB1; compartment*b*sb^n/(sb^n + Ovol2^n);  // modifiers: Ovol2
  SNAI1_inhibition_of_CDH1: => CDH1; compartment*b*sb^n/(sb^n + SNAI1^n);  // modifiers: SNAI1
  SNAI1_activation_of_FOXC2: => FOXC2; compartment*a*SNAI1^n/(sa^n + SNAI1^n);  // modifiers: SNAI1
  SNAI1_inhibition_of_SNAI1: => SNAI1; compartment*b*sb^n/(sb^n + SNAI1^n);
  SNAI1_inhibition_of_miR200: => miR200; compartment*b*sb^n/(sb^n + SNAI1^n);  // modifiers: SNAI1
  SNAI1_activation_of_TWIST1: => TWIST1; compartment*a*SNAI1^n/(sa^n + SNAI1^n);  // modifiers: SNAI1
  SNAI1_activation_of_VIM: => VIM; compartment*a*SNAI1^n/(sa^n + SNAI1^n);  // modifiers: SNAI1
  SNAI1_activation_of_ZEB1: => ZEB1; compartment*a*SNAI1^n/(sa^n + SNAI1^n);  // modifiers: SNAI1
  SNAI1_activation_of_ZEB2: => ZEB2; compartment*a*SNAI1^n/(sa^n + SNAI1^n);  // modifiers: SNAI1
  SNAI1_inhibition_of_miR34a: => miR34a; compartment*b*sb^n/(sb^n + SNAI1^n);  // modifiers: SNAI1
  SNAI2_inhibition_of_CDH1: => CDH1; compartment*b*sb^n/(sb^n + SNAI2^n);  // modifiers: SNAI2
  SNAI2_activation_of_SNAI2: => SNAI2; compartment*tilde*SNAI2^n/(sa^n + SNAI2^n);
  SNAI2_activation_of_VIM: => VIM; compartment*a*SNAI2^n/(sa^n + SNAI2^n);  // modifiers: SNAI2
  SNAI2_inhibition_of_miR200: => miR200; compartment*b*sb^n/(sb^n + SNAI2^n);  // modifiers: SNAI2
  TCF3_inhibition_of_CDH1: => CDH1; compartment*b*sb^n/(sb^n + TCF3^n);  // modifiers: TCF3
  TGFbeta_activation_of_GSC: => GSC; compartment*a*TGFbeta^n/(sa^n + TGFbeta^n);  // modifiers: TGFbeta
  TGFbeta_activation_of_SNAI2: => SNAI2; compartment*a*TGFbeta^n/(sa^n + TGFbeta^n);  // modifiers: TGFbeta
  TGFbeta_activation_of_ZEB1: => ZEB1; compartment*a*TGFbeta^n/(sa^n + TGFbeta^n);  // modifiers: TGFbeta
  TWIST1_inhibition_of_CDH1: => CDH1; compartment*b*sb^n/(sb^n + TWIST1^n);  // modifiers: TWIST1
  TWIST1_activation_of_FOXC2: => FOXC2; compartment*a*TWIST1^n/(sa^n + TWIST1^n);  // modifiers: TWIST1
  TWIST1_activation_of_SNAI2: => SNAI2; compartment*a*TWIST1^n/(sa^n + TWIST1^n);  // modifiers: TWIST1
  TWIST1_activation_of_TCF3: => TCF3; compartment*a*TWIST1^n/(sa^n + TWIST1^n);  // modifiers: TWIST1
  TWIST1_activation_of_VIM: => VIM; compartment*a*TWIST1^n/(sa^n + TWIST1^n);  // modifiers: TWIST1
  TWIST1_activation_of_ZEB2: => ZEB2; compartment*a*TWIST1^n/(sa^n + TWIST1^n);  // modifiers: TWIST1
  ZEB1_inhibition_of_CDH1: => CDH1; compartment*b*sb^n/(sb^n + ZEB1^n);  // modifiers: ZEB1
  ZEB1_inhibition_of_Ovol2: => Ovol2; compartment*b*sb^n/(sb^n + ZEB1^n);  // modifiers: ZEB1
  ZEB1_activation_of_ZEB1: => ZEB1; compartment*tilde*ZEB1^n/(sa^n + ZEB1^n);
  ZEB1_activation_of_VIM: => VIM; compartment*a*ZEB1^n/(sa^n + ZEB1^n);  // modifiers: ZEB1
  ZEB1_inhibition_of_miR141: => miR141; compartment*b*sb^n/(sb^n + ZEB1^n);  // modifiers: ZEB1
  ZEB1_inhibition_of_miR200: => miR200; compartment*b*sb^n/(sb^n + ZEB1^n);  // modifiers: ZEB1
  ZEB1_inhibition_of_miR34a: => miR34a; compartment*b*sb^n/(sb^n + ZEB1^n);  // modifiers: ZEB1
  ZEB1_inhibition_of_miR145: => miR145; compartment*b*sb^n/(sb^n + ZEB1^n);  // modifiers: ZEB1
  ZEB2_inhibition_of_CDH1: => CDH1; compartment*b*sb^n/(sb^n + ZEB2^n);  // modifiers: ZEB2
  ZEB2_activation_of_VIM: => VIM; compartment*a*ZEB2^n/(sa^n + ZEB2^n);  // modifiers: ZEB2
  ZEB2_activation_of_ZEB2: => ZEB2; compartment*tilde*ZEB2^n/(sa^n + ZEB2^n);
  ZEB2_inhibition_of_miR200: => miR200; compartment*b*sb^n/(sb^n + ZEB2^n);  // modifiers: ZEB2

  // Unit definitions:
  unit substance = item; substance is "dimensionless";
  unit time = 3600 second; time is "hours";
end
