// SBML level 2 version 4

model model()
  // Li_and_Wang_CancerRes_2015
  // The SBML model constructed is based on Li C, Wang J. Quantifying the Landscape for Development and Cancer from a Core Cancer Stem Cell Circuit. Cancer Res. 2015:canres. 0079.2015.

  // Compartments:
  compartment compartment = 1; compartment is "cell";

  // Species:
  species P53 in compartment = 0;
  species Mdm2 in compartment = 0;
  species Oct4 in compartment = 0;
  species miR145 in compartment = 0;
  species Zeb in compartment = 0;
  species miR200 in compartment = 0;

  // Parameters:
  sa = 0.8;
  a = 0.5;
  b = 0.1;
  S = 0.5;
  n = 4;
  k = 1;

  // Reactions:
  P53_self_activation: => P53; compartment*sa*P53^n/(S^n + P53^n);
  Mdm2_inhibition_of_P53: => P53; compartment*b*S^n/(S^n + Mdm2^n);  // modifiers: Mdm2
  P53_degradation: P53 => ; compartment*k*P53;
  P53_activation_of_Mdm2: => Mdm2; compartment*a*P53^n/(S^n + P53^n);  // modifiers: P53
  miR145_inhibition_of_Mdm2: => Mdm2; compartment*b*S^n/(S^n + miR145^n);  // modifiers: miR145
  Mdm2_degradation: Mdm2 => ; compartment*k*Mdm2;
  Oct4_self_activation: => Oct4; compartment*sa*Oct4^n/(S^n + Oct4^n);
  P53_inhibition_of_Oct4: => Oct4; compartment*b*S^n/(S^n + P53^n);  // modifiers: P53
  miR145_inhibition_of_Oct4: => Oct4; compartment*b*S^n/(S^n + miR145^n);  // modifiers: miR145
  Oct4_degradation: Oct4 => ; compartment*k*Oct4;
  P53_activation_of_miR145: => miR145; compartment*a*P53^n/(S^n + P53^n);  // modifiers: P53
  Oct4_inhibition_of_miR145: => miR145; compartment*b*S^n/(S^n + Oct4^n);  // modifiers: Oct4
  Zeb_inhibition_of_miR145: => miR145; compartment*b*S^n/(S^n + Zeb^n);  // modifiers: Zeb
  miR145_degradation: miR145 => ; compartment*k*miR145;
  Zeb_self_activation: => Zeb; compartment*sa*Zeb^n/(S^n + Zeb^n);
  miR145_inhibition_of_Zeb: => Zeb; compartment*b*S^n/(S^n + miR145^n);  // modifiers: miR145
  miR200_inhibition_of_Zeb: => Zeb; compartment*b*S^n/(S^n + miR200^n);  // modifiers: miR200
  Zeb_degradation: Zeb => ; compartment*k*Zeb;
  P53_activation_of_miR200: => miR200; compartment*a*P53^n/(S^n + P53^n);  // modifiers: P53
  Oct4_activation_of_miR200: => miR200; compartment*a*Oct4^n/(S^n + Oct4^n);  // modifiers: Oct4
  Zeb_inhibition_of_miR200: => miR200; compartment*b*S^n/(S^n + Zeb^n);  // modifiers: Zeb
  miR200_degradation: miR200 => ; compartment*k*miR200;

  // Unit definitions:
  unit substance = item; substance is "dimensionless";
  unit time = 3600 second; time is "hours";
end
